# Запишем условие задания
X3 := [□; □]  # error: Пустой местозаполнитель.
X1 := [4; 4]
Y1 := [2; 8]  # - координаты отрезка AB
X2 := [6; 6]
Y2 := [7; 3]  # - координаты отрезка CD
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# Найдем точку пересечения прямых
Given
x + y == 14  # - уравнение прямой АВ
x - y == -1  # - уравнение прямой CD
Find(x, y) → [13/2; 15/2]
Px := 13/2
Py := 15/2
# Найдем новые координаты точек A,B,C,D после поворота на угол 180^о
P := [X1[0], X1[1], X2[0], X2[1]; Y1[0], Y1[1], Y2[0], Y2[1]; 1, 1, 1, 1]  # - матрица координат
Ts(dx, dy) := [1, 0, -dx; 0, 1, -dy; 0, 0, 1]  # - смещение начала системы координат
Rs(ϕ) := [cos(ϕ), sin(ϕ), 0; -sin(ϕ), cos(ϕ), 0; 0, 0, 1]  # - поворот системы координат на угол ϕ
ϕ := 180
ϕ_rad := ϕ*π/180  # - угол в радианах
# Сместим систему координат в точку Р
A := Ts(Px, Py)*P = [-2.5, -2.5, -0.5, -0.5; -5.5, 0.5, -0.5, -4.5; 1, 1, 1, 1]
# Повернем систему координат на 180 градусов
B := Rs(ϕ_rad)*A = [2.5, 2.5, 0.5, 0.5; 5.5, -0.5, 0.5, 4.5; 1, 1, 1, 1]
# Снова сместим систему координат в исходное положение
C := Ts(-Px, -Py)*B = [9, 9, 7, 7; 13, 7, 8, 12; 1, 1, 1, 1]
X3 := [11; 8]
Y3 := [3; 6]
X4 := [11; 8]
Y4 := [12; 9]
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