x := -5, -5 + 0.5 .. 5
x = [-5; -4.5; -4; -3.5; -3; -2.5; -2; -1.5; -1; -0.5; 0; 0.5; 1; 1.5; 2; 2.5; 3; 3.5; 4; 4.5; 5]
f(x) := sin(x)
g(x) := cos(x)
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x := 0
root(f(x), x) = 0
v := [-5*rnd(1); -5*rnd(1); -5*rnd(1); -5*rnd(1); -5*rnd(1)]
v = [-4.37984; -4.7795; -2.69671; -2.31037; -4.3111]
g := v[0]*v[4]
g = 18.8819
x := 0
y := 0
Given
x + y == 1
x - y == 0
Find(x, y) = [0.5; 0.5]
f := [1, 1; 1, -1]
h := [1; 0]
e := f^-1*h = [0.5; 0.5]
