x := 2
n := 7
y := (sqrt(x^3 + n) + cos(|n*x - 1|)^2)/(nthroot(x^5 + sin(x) + n, 4)*cos(π/4*(x + n)))
y = 2.6425
x := 7
y := 10
z := -3
p := if(x > y, sin(x) + 3*|y| - z^2, (y + 3)/sqrt(z^2 + 1)*ln(|x + 1|))
p = 8.5485
q := if((x > y) and (x < 1), cos(x) + 2*|y + 1|, (x*y + 3)/sqrt(y^2 + 5))
q = 7.12407
w := if((x < y) or (y ≥ 10), x^2 + 2*(y*x + 1), (x^-3*y^2 + 3)*sqrt(z^2 + 7))
w = 191
x := -2, -2 + 0.4 .. 2
n := 4
f(x) := (x^2 - n*x + sin(x))*sqrt(|x - cos(x)|)
f(x) = [13.9578; 9.97693; 6.63465; 3.82024; 1.57531; 0; -0.758358; -0.592212; -2.22214; -3.62552; -4.80418]
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n := rnd(10)
A := runif(3, -9, 9) = [-5.52019; 1.53011; -2.69445]
B := [-3*n + rnd(1 + 6*n + 1); -3*n + rnd(1 + 6*n + 1); -3*n + rnd(1 + 6*n + 1)] = [1.67025; 0.323458; 1.43701]
A := [-3*n + rnd(1 + 6*n + 1); -3*n + rnd(1 + 6*n + 1); -3*n + rnd(6*n + 1 + 1)] = [0.593054; 0.151727; 0.267786]
C := [-3*n + rnd(1 + 6*n + 1); -3*n + rnd(1 + 6*n + 1); -3*n + rnd(1 + 6*n + 1)] = [2.01419; 0.209169; -0.0195282]
w := (A×B)*C = 0.181195
s := A*B = 1.42443
V := B×C = [-0.306895; 2.92704; -0.302142]
# Это A
|A| = 0.668164
|B| = 2.22696
|C| = 2.02512
length(C) = 3
N := 0 .. 15
H := 0 .. 15
M[N, H] := -10 + trunc(rnd(1)*20)
M = [
    0, 2, -7, -1, -9, 5, 0, 7, 9, 0, -1, 7, 5, 9, 2, -5;
    6, -3, 3, -10, -5, 1, 6, -1, 4, -1, 4, 1, 4, 1, -7, -2;
    0, 5, -7, -1, 3, -8, -8, 3, -2, 9, -7, 6, -7, 6, -7, 4;
    -5, 3, 4, -8, 6, 0, -2, 8, 0, -1, 6, -1, 9, 4, -7, 6;
    0, -10, 1, 0, 6, 3, 6, -8, -4, -5, -8, 6, 2, -5, -10, 6;
    -6, 1, -8, 5, 0, -2, 3, -2, 1, 2, 0, 3, -7, -7, -1, -9;
    -9, 8, 7, -6, -2, 2, -1, 1, 7, 2, 1, -7, 1, -6, 2, 1;
    -1, 4, 2, 6, 1, 8, 4, 3, -4, -4, -8, 7, -7, -9, 2, 0;
    -2, -1, -7, 4, 6, 7, -4, -8, 5, 2, -9, 3, -8, -6, 8, 3;
    -1, -1, 0, 3, 2, -10, -8, 7, 4, -3, 1, 9, -7, -8, 9, -10;
    -9, -8, 7, 4, -10, 4, -6, -7, -4, -3, 6, 0, 5, -8, -2, -8;
    -9, 1, 0, -4, 6, -5, 7, 4, -3, -6, -6, 0, -9, 0, -9, 7;
    -8, 8, -10, -4, -3, 8, 0, 3, -5, 0, -3, 1, 3, -2, -10, 2;
    1, -6, -10, -9, 7, 6, 3, 0, -8, 4, -10, 2, -9, 8, -5, 9;
    -5, -3, -6, -6, 8, 8, -9, -7, 5, -6, -10, -8, -4, -10, -7, -7;
    7, -7, 2, 8, 8, -7, 1, 8, 1, -5, -3, 5, -9, 1, -7, 2
]
sum := sum(sum(M[i, j], j = 0 .. 15), i = 0 .. 15)
sum = -191
prog(M) :=
    s ← 0
    for a ∈ M
        s ← s + a if a > 0
prog(M) = 525
prog(M) :=
    s ← 0
    for a ∈ M
        s ← s + a if a < 0
prog(M) = -716
X := M[:, 0]
Y := transpose(M)[:, 15]
X*Y = 50
y(x) := e^(-(|x|/3))*cos(x)
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x := -9, -9 + 0.25 .. 9
f(x) := if(x < 0, e^x*x^3, e^(-x)*x^3)
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g(x) := sqrt(|x|)*sin(x)
x := -2*π, -2*π + π/4 .. 2*π
i := 0 .. (2*π - (-2*π))/(π/4)
X[i] := -2*π + i*π/4
i = [0; 1; 2; 3; 4; 5; 6; 7; 8; 9; 10; 11; 12; 13; 14; 15; 16]
X = [-6.28319; -5.49779; -4.71239; -3.92699; -3.14159; -2.35619; -1.5708; -0.785398; 0; 0.785398; 1.5708; 2.35619; 3.14159; 3.92699; 4.71239; 5.49779; 6.28319]
Y[i] := g(X[i])
Y = [0; 1.65798; 2.1708; 1.40125; 0; -1.0854; -1.25331; -0.626657; 0; 0.626657; 1.25331; 1.0854; 0; -1.40125; -2.1708; -1.65798; 0]
WRITEPRN("X.txt") := X
WRITEPRN("Y.txt") := Y
XX := READPRN("X.txt")
YY := READPRN("Y.txt")
YY[i] := g(XX[i])
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q(x) := e^(-x^2)
x - 3 .. 3
q'(x) := d/dx(q(x))
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f(x, y) := sin(sqrt(x^2 + y^2))/sqrt(x^2 + y^2)
# [component: inputs f]
x := -5 .. 5
f(x) := x^2 + (x - 2)*sin(x) - 5
root(f(x), x) = [-1.32936; -1.32936; -1.32936; -1.32936; -1.32936; -1.32936; 2.19967; 2.19967; 2.19967; 2.19967; 2.19967]
x := -1.329
x^2 + (x - 2)*sin(x) - 5 = -0.00160155
x := 2.2
x^2 + (x - 2)*sin(x) - 5 = 0.00169928
f(xx) := xx^2 + xx*sin(2*xx) - (xx - 5)*cos(xx)
xx := -2.974
root(f(xx), xx, -4, -2) = -2.97354
xx^2 + xx*sin(2*xx) - (xx - 5)*cos(xx) = 0.00411823
root(f(xx), xx, -2, 4) = -1.93283
xx := -1.933
xx^2 + xx*sin(2*xx) - (xx - 5)*cos(xx) = -0.00110412
xx := -4 .. 4
root(f(xx), xx) = [-2.97354; -2.97354; -1.93283; -2.97354; -1.93283; -1.93283; -2.97354; -1.93283; -1.93283]
n := 7
v := [3*n; 3 - 4*n; 4 - n; 1]
x := polyroots(v) = [-4.18092; 0.785361; 6.39556]
x^3 + (4 - n)*x^2 + (3 - 4*n)*x - 3*n = [-42; -42; -42]
n := 7
A := [n, n + 1, n + 2; n - 3, n - 2, n; n - 1, n, n + 1]
b := [6*n + 8; 6*n - 7; 6*n + 2]
x := lsolve(A, b) = [1; 2; 3]
x := A^-1*b = [1; 2; 3]
x := 1
y := 2
z := 3
n*x + (n + 1)*y + (n + 2)*z = 50
6*n + 8 = 50
(n - 3)*x + (n - 2)*y + n*z = 35
6*n - 7 = 35
(n - 1)*x + n*y + (n + 1)*z = 44
6*n + 2 = 44
n := 7
f(x, y, z) := n*x + (n + 1)*y + (n + 2)*z
g(x, y, z) := (n - 3)*x + (n - 2)*y + n*z
h(x, y, z) := (n - 1)*x + n*y + (n + 1)*z
Given
f(x, y, z) == 6*n + 8
g(x, y, z) == 6*n - 7
h(x, y, z) == 6*n + 2
v := Find(x, y, z)
v = [1; 2; 3]
x := -9, -8.5 .. 14
y := -6, -5.5 .. 7
ellipse(x) := sqrt(4^2*(1 - x^2/9^2))
circle(x) := 2 + sqrt(25 - (x - 9)^2)
circle2(x) := 2 - sqrt(25 - (x - 9)^2)
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# Точки пересечения: х1 = 6.9, у1 = -2.5; х2 = 4.4, у2 = 3.5
i := 0 .. 10
x[i] := i
f(x) := x*sin(x)
Maximize(f, x) = [0; 2.04454; 2.02438; 2.0269; -2.02943; 7.97671; 7.98259; 7.97836; 7.97934; 7.98204; 7.97682]
Minimize(f, x) = [0; -0.112808; 0.067603; 4.9097; 4.90988; 4.90397; 4.9186; 4.90774; 11.074; 11.0842; 11.087]
